///////////////////////////////////////////////////////
///////////////////////////////////////////////////////


///////////////////////////////////////////////////////
//
// Electrification study simulation model
// Copyright (C) 2016, Stanford University
// Author: aivanova@slac.stanford.edu
//
///////////////////////////////////////////////////////

//
// Read the configuration file for this system
// Assumes the model is run from parent of model folder
//
#include "config/default.glm"
#define CONFIGFILE=config/default.glm
#ifexist config/local.glm
#include "config/local.glm"
#set CONFIGFILE=config/local.glm
#endif
#set suppress_repeat_messages=TRUE
#ifdef TIMEZONE
clock {
	timezone ${TIMEZONE};
#ifdef STARTTIME
	starttime ${STARTTIME};
#endif
#ifdef STOPTIME
	stoptime ${STOPTIME};
#endif
}
#else
#error TIMEZONE is not specified in ${CONFIGFILE}
#endif // TIMEZONE

///////////////////////////////////////////////////////
//
// WEATHER
//
///////////////////////////////////////////////////////
#ifexist data/${WEATHER}
module climate;
object climate {
        name weather;
        tmyfile "data/${WEATHER}";
        interpolate QUADRATIC;
}
#else
#error WEATHER is not specified in ${CONFIGFILE}
#endif // exist WEATHER


#ifdef SOLAR
module generators;
#endif // SOLAR
module powerflow;
module tape;
module residential{
	implicit_enduses REFRIGERATOR|LIGHTS|PLUGS|WATERHEATER|RANGE|DRYER;
	paneldump_interval -1;
	paneldump_filename "paneldump/paneldump_${RUN_NAME}";
}

object meter {
	name main_node;
	nominal_voltage 2401 V;
	phases ABCN;
}
object recorder {
	name main_recorder;
	parent main_node;
	property measured_real_power[kW], measured_reactive_power[kVA], measured_real_energy[kWh], measured_reactive_energy[VAh];
	interval -1;
	file "output/substation_power_${RUN_NAME}.csv";
}
object meter {
	name main_node_A;
	parent main_node;
	nominal_voltage 2401 V;
	phases AN;
}
object meter {
	name main_node_B;
	parent main_node;
	nominal_voltage 2401 V;
	phases BN;
}
object meter {
	name main_node_C;
	parent main_node;
	nominal_voltage 2401 V;
	phases CN;
}

object transformer_configuration {
	name xfmr_config_A;
	connect_type SINGLE_PHASE_CENTER_TAPPED;
	install_type POLETOP;
	powerA_rating 1000;
	primary_voltage 2401;
	secondary_voltage 120.000 V;
	impedance 0.006+0.0136j;
}
object transformer_configuration {
	name xfmr_config_B;
	connect_type SINGLE_PHASE_CENTER_TAPPED;
	install_type POLETOP;
	powerB_rating 1000;
	primary_voltage 2401 V;
	secondary_voltage 120.000 V;
	impedance 0.006+0.0136j;
}
object transformer_configuration {
	name xfmr_config_C;
	connect_type SINGLE_PHASE_CENTER_TAPPED;
	install_type POLETOP;
	powerC_rating 1000;
	primary_voltage 2401 V;
	secondary_voltage 120.000 V;
	impedance 0.006+0.0136j;
}
global int32 SEQ_CUSTID 0;
#set allow_reinclude=true
#if GAS_COUNT!=0
#include using(LOADID=1,PHASE=A,COUNT=${GAS_COUNT},GAS=yes) "house.glm"
#include using(LOADID=1,PHASE=B,COUNT=${GAS_COUNT},GAS=yes) "house.glm"
#include using(LOADID=1,PHASE=C,COUNT=${GAS_COUNT},GAS=yes) "house.glm"
#endif //GAS_COUNT

#if ELEC_COUNT!=0
#include using(LOADID=1,PHASE=A,COUNT=${ELEC_COUNT},GAS=no) "house.glm"
#include using(LOADID=1,PHASE=B,COUNT=${ELEC_COUNT},GAS=no) "house.glm"
#include using(LOADID=1,PHASE=C,COUNT=${ELEC_COUNT},GAS=no) "house.glm"
#endif //ELEC_COUNT
